# OpenSim document version 40600
Model:
  gravity: 0 0 0
  Ground
  BodySet:
    Body base: mass=1 mass_center=(0 0 0) inertia=(0.1 0.1 0.1 0 0 0)
    Body follower: mass=1 mass_center=(0 0 0) inertia=(0.1 0.1 0.1 0 0 0)
    Body anchor: mass=1 mass_center=(0 0 0) inertia=(0.1 0.1 0.1 0 0 0)
  JointSet:
    PinJoint base: socket_parent_frame=ground_offset socket_child_frame=base_offset
      Coordinate q: default_value=0.3
      PhysicalOffsetFrame ground_offset: socket_parent=/ground translation=(0 0 0)
      PhysicalOffsetFrame base_offset: socket_parent=/bodyset/base translation=(0 0 0)
    PinJoint follower: socket_parent_frame=ground_offset socket_child_frame=follower_offset
      Coordinate dependent: default_value=0.6
      PhysicalOffsetFrame ground_offset: socket_parent=/ground translation=(0 0 0)
      PhysicalOffsetFrame follower_offset: socket_parent=/bodyset/follower translation=(0 0 0)
    PinJoint anchor: socket_parent_frame=ground_offset socket_child_frame=anchor_offset
      Coordinate fixed: default_value=0.2
      PhysicalOffsetFrame ground_offset: socket_parent=/ground translation=(0 0 0)
      PhysicalOffsetFrame anchor_offset: socket_parent=/bodyset/anchor translation=(0 0 0)
  ForceSet:
    Millard2012EquilibriumMuscle flexor: min_control=0.01 max_control=1 max_isometric_force=10 optimal_fiber_length=0.1
        tendon_slack_length=0.2 pennation_angle_at_optimal=0
      PathPoint origin: ground (0 -0.15 0)
      PathPoint insertion: base (0 0.15 0)
      ActiveForceLengthCurve: minimum_value=0
      ForceVelocityCurve: concentric_slope_at_vmax=0 concentric_slope_near_vmax=0.25 isometric_slope=5
          eccentric_slope_at_vmax=0 eccentric_slope_near_vmax=0.15 max_eccentric_velocity_force_multiplier=1.4
      FiberForceLengthCurve
      TendonForceLengthCurve
    Millard2012EquilibriumMuscle extensor: min_control=0.01 max_control=1 max_isometric_force=10
        optimal_fiber_length=0.1 tendon_slack_length=0.2 pennation_angle_at_optimal=0
      PathPoint origin: ground (0 -0.15 0)
      PathPoint insertion: follower (0 0.15 0)
      ActiveForceLengthCurve: minimum_value=0
      ForceVelocityCurve: concentric_slope_at_vmax=0 concentric_slope_near_vmax=0.25 isometric_slope=5
          eccentric_slope_at_vmax=0 eccentric_slope_near_vmax=0.15 max_eccentric_velocity_force_multiplier=1.4
      FiberForceLengthCurve
      TendonForceLengthCurve
  MarkerSet:
    Marker base_marker: base (0 -0.1 0)
