# OpenSim document version 40600
Model synthetic_native_muscle_fixture:
  gravity: 0 0 0
  Ground
  BodySet:
    Body load: mass=1 [kg] mass_center=(0 0 0) inertia=(0.01 0.01 0.01 0 0 0)
  JointSet:
    SliderJoint slider: socket_parent_frame=ground_offset socket_child_frame=load_offset
      Coordinate slide: default_value=0.31
      PhysicalOffsetFrame ground_offset: socket_parent=/ground translation=(0 0 0) [meters]
      PhysicalOffsetFrame load_offset: socket_parent=/bodyset/load translation=(0 0 0)
  ForceSet:
    Millard2012EquilibriumMuscle flexor: min_control=0.01 max_control=1 max_isometric_force=10 optimal_fiber_length=0.1
        tendon_slack_length=0.2 pennation_angle_at_optimal=0 [radians]
      PathPoint origin: ground (0 0 0)
      PathPoint insertion: load (0 0 0)
      ActiveForceLengthCurve: minimum_value=0
      ForceVelocityCurve: concentric_slope_at_vmax=0 concentric_slope_near_vmax=0.25 isometric_slope=5
          eccentric_slope_at_vmax=0 eccentric_slope_near_vmax=0.15 max_eccentric_velocity_force_multiplier=1.4
      FiberForceLengthCurve
      TendonForceLengthCurve
  MarkerSet:
    Marker load_marker: load (0 0 0)
