# OpenSim document version 40000
Model full_body_spec_anthro_driver:
  gravity: 0 0 -9.80665
  length_units: m
  force_units: N
  Ground
  BodySet:
    Body solid_reference:GolfSwing3D_Kinetic/Hips and Torso Inputs/LowerTorso: mass=8.7126 mass_center=(0 0 0.08449859)
        inertia=(0.05050763 0.06292222 0.05732314 0 0 0)
    Body solid_reference:GolfSwing3D_Kinetic/Hips and Torso Inputs/UpperTorsoBase: mass=0.3 mass_center=(0 0 0)
        inertia=(0.0001 0.0001 0.0001 0 0 0)
    Body solid_reference:GolfSwing3D_Kinetic/Hips and Torso Inputs/COMRod: mass=25.1862 mass_center=(0 0 0.1838742)
        inertia=(0.4065663 0.4768356 0.2216828 0 0 0)
    Body GolfSwing3D_Kinetic/Head: mass=5.4132 mass_center=(0 0 0.1193352)
        inertia=(0.03057207 0.02828714 0.02098866 0 0 0)
    Body solid_reference:GolfSwing3D_Kinetic/HubtoLS: mass=0.42276 mass_center=(0 0.1125194 0)
        inertia=(0.00116252 0.0004010606 0.001304925 0 0 0)
    Body solid_reference:GolfSwing3D_Kinetic/LUpperArm: mass=2.1138 mass_center=(0 0 -0.1756723)
        inertia=(0.01416845 0.01590404 0.004888007 0 0 0)
    Body solid_reference:GolfSwing3D_Kinetic/Left Elbow Joint/Spherical Solid: mass=0.6318
        mass_center=(0 0 -0.06644266) inertia=(0.0009362095 0.001015546 0.0001951875 0 0 0)
    Body solid_reference:GolfSwing3D_Kinetic/Left Forearm/LLowerForearm: mass=0.6318 mass_center=(0 0 -0.06644266)
        inertia=(0.0009362095 0.001015546 0.0001951875 0 0 0)
    Body solid_reference:GolfSwing3D_Kinetic/Club/Clubface Vector: mass=1.421272
        mass_center=(-8.799908e-5 -0.9034062 0.0635946)
        inertia=(0.220651 0.001542535 0.2207367 -2.758979e-5 -3.106385e-7 -0.0001061817)
    Body solid_reference:GolfSwing3D_Kinetic/HubtoRS: mass=0.42276 mass_center=(0 -0.1125194 0)
        inertia=(0.00116252 0.0004010606 0.001304925 0 0 0)
    Body solid_reference:GolfSwing3D_Kinetic/RUpperArm: mass=2.1138 mass_center=(0 0 -0.1756723)
        inertia=(0.01416845 0.01590404 0.004888007 0 0 0)
    Body solid_reference:GolfSwing3D_Kinetic/Right Elbow Joint/Spherical Solid1: mass=0.6318
        mass_center=(0 0 -0.06644266) inertia=(0.0009362095 0.001015546 0.0001951875 0 0 0)
    Body solid_reference:GolfSwing3D_Kinetic/Right Forearm/RLowerForearm: mass=0.6318 mass_center=(0 0 -0.06644266)
        inertia=(0.0009362095 0.001015546 0.0001951875 0 0 0)
    Body solid_reference:GolfSwing3D_Kinetic/Grip/RHandStandoff: mass=0.01 mass_center=(0 0 0)
        inertia=(9.408583e-7 9.408583e-7 8.0645e-7 0 0 0)
    Body femur_r: mass=9.800404 mass_center=(0 -0.168783 0) inertia=(0.13907 0.0364552 0.146652 0 0 0)
    Body tibia_r: mass=3.906401 mass_center=(0 -0.204691 0) inertia=(0.0634325 0.0056617 0.0634325 0 0 0)
    Body talus_r: mass=0.1053648 mass_center=(0 0 0) inertia=(0.00108152 0.000973557 0.000973557 0 0 0)
    Body calcn_r: mass=1.31706 mass_center=(0.0906376 0.03 0) inertia=(0.00151413 0.00352695 0.00352695 0 0 0)
    Body toes_r: mass=0.2282202 mass_center=(0.0313606 0.006 -0.017963)
        inertia=(0.000108152 0.000183915 0.000183915 0 0 0)
    Body femur_l: mass=9.800404 mass_center=(0 -0.16385 0) inertia=(0.13106 0.0343555 0.138205 0 0 0)
    Body tibia_l: mass=3.906401 mass_center=(0 -0.202735 0) inertia=(0.0622653 0.00563255 0.0622653 0 0 0)
    Body talus_l: mass=0.1053648 mass_center=(0 0 0) inertia=(0.00107874 0.000962282 0.000962282 0 0 0)
    Body calcn_l: mass=1.31706 mass_center=(0.0895969 0.03 0) inertia=(0.00151023 0.00346176 0.00346176 0 0 0)
    Body toes_l: mass=0.2282202 mass_center=(0.0310005 0.006 0.0179167)
        inertia=(0.000107874 0.000180811 0.000180811 0 0 0)
  JointSet:
    CustomJoint GolfSwing3D_Kinetic/Hips and Torso Inputs/Hip Kinetically Driven/Hip Joint: socket_parent_frame=(GolfSwing3D_Kinetic/Hips and Torso Inputs/Hip Kinetically Driven/Hip Joint_parent_offset)
        socket_child_frame=(GolfSwing3D_Kinetic/Hips and Torso Inputs/Hip Kinetically Driven/Hip Joint_child_offset)
      Coordinate TranslationInputX: default_value=0 range=(-10 10) clamped=false
      Coordinate TranslationInputY: default_value=0 range=(-10 10) clamped=false
      Coordinate TranslationInputZ: default_value=0 range=(-10 10) clamped=false
      Coordinate HipInputX: default_value=0 range=(-3.141593 3.141593) clamped=false
      Coordinate HipInputY: default_value=0 range=(-3.141593 3.141593) clamped=false
      Coordinate HipInputZ: default_value=0 range=(-3.141593 3.141593) clamped=false
      PhysicalOffsetFrame GolfSwing3D_Kinetic/Hips and Torso Inputs/Hip Kinetically Driven/Hip Joint_parent_offset: socket_parent=/ground
          translation=(0 0 0)
      PhysicalOffsetFrame GolfSwing3D_Kinetic/Hips and Torso Inputs/Hip Kinetically Driven/Hip Joint_child_offset: socket_parent=(/bodyset/solid_reference:GolfSwing3D_Kinetic/Hips and Torso Inputs/LowerTorso)
          translation=(0 0 0)
      SpatialTransform:
        TransformAxis rotation1: coordinates=HipInputX axis=(1 0 0) LinearFunction(coefficients=1 0)
        TransformAxis rotation2: coordinates=HipInputY axis=(0 1 0) LinearFunction(coefficients=1 0)
        TransformAxis rotation3: coordinates=HipInputZ axis=(0 0 1) LinearFunction(coefficients=1 0)
        TransformAxis translation1: coordinates=TranslationInputX axis=(1 0 0) LinearFunction(coefficients=1 0)
        TransformAxis translation2: coordinates=TranslationInputY axis=(0 1 0) LinearFunction(coefficients=1 0)
        TransformAxis translation3: coordinates=TranslationInputZ axis=(0 0 1) LinearFunction(coefficients=1 0)
    CustomJoint GolfSwing3D_Kinetic/Hips and Torso Inputs/Spine Tilt Kinetically Driven/Universal Joint/Kinetically Driven Universal Joint: socket_parent_frame=(GolfSwing3D_Kinetic/Hips and Torso Inputs/Spine Tilt Kinetically Driven/Universal Joint/Kinetically Driven Universal Joint_parent_offset)
        socket_child_frame=(GolfSwing3D_Kinetic/Hips and Torso Inputs/Spine Tilt Kinetically Driven/Universal Joint/Kinetically Driven Universal Joint_child_offset)
      Coordinate SpineInputX: default_value=0 range=(-0.6108652 0.6108652) clamped=false
      Coordinate SpineInputY: default_value=0 range=(-0.7853982 0.7853982) clamped=false
      PhysicalOffsetFrame GolfSwing3D_Kinetic/Hips and Torso Inputs/Spine Tilt Kinetically Driven/Universal Joint/Kinetically Driven Universal Joint_parent_offset: socket_parent=(/bodyset/solid_reference:GolfSwing3D_Kinetic/Hips and Torso Inputs/UpperTorsoBase)
          translation=(0 0 0)
      PhysicalOffsetFrame GolfSwing3D_Kinetic/Hips and Torso Inputs/Spine Tilt Kinetically Driven/Universal Joint/Kinetically Driven Universal Joint_child_offset: socket_parent=(/bodyset/solid_reference:GolfSwing3D_Kinetic/Hips and Torso Inputs/COMRod)
          translation=(0 0 0)
      SpatialTransform: axes_held_at_zero=(rotation3 translation1 translation2 translation3)
        TransformAxis rotation1: coordinates=SpineInputX axis=(1 0 0) LinearFunction(coefficients=1 0)
        TransformAxis rotation2: coordinates=SpineInputY axis=(0 1 0) LinearFunction(coefficients=1 0)
    CustomJoint GolfSwing3D_Kinetic/Hips and Torso Inputs/Torso Kinetically Driven/Revolute Joint/Kinetically Driven Revolute: socket_parent_frame=(GolfSwing3D_Kinetic/Hips and Torso Inputs/Torso Kinetically Driven/Revolute Joint/Kinetically Driven Revolute_parent_offset)
        socket_child_frame=(GolfSwing3D_Kinetic/Hips and Torso Inputs/Torso Kinetically Driven/Revolute Joint/Kinetically Driven Revolute_child_offset)
      Coordinate TorsoInput: default_value=0 range=(-1.745329 1.745329) clamped=false
      PhysicalOffsetFrame GolfSwing3D_Kinetic/Hips and Torso Inputs/Torso Kinetically Driven/Revolute Joint/Kinetically Driven Revolute_parent_offset: socket_parent=(/bodyset/solid_reference:GolfSwing3D_Kinetic/Hips and Torso Inputs/LowerTorso)
          translation=(0 0 0.1381825)
      PhysicalOffsetFrame GolfSwing3D_Kinetic/Hips and Torso Inputs/Torso Kinetically Driven/Revolute Joint/Kinetically Driven Revolute_child_offset: socket_parent=(/bodyset/solid_reference:GolfSwing3D_Kinetic/Hips and Torso Inputs/UpperTorsoBase)
          translation=(0 0 0)
      SpatialTransform: axes_held_at_zero=(rotation2 rotation3 translation1 translation2 translation3)
        TransformAxis rotation1: coordinates=TorsoInput axis=(0 0 1) LinearFunction(coefficients=1 0)
    CustomJoint GolfSwing3D_Kinetic/Left Elbow Joint/Revolute Joint/Kinetically Driven Revolute: socket_parent_frame=(GolfSwing3D_Kinetic/Left Elbow Joint/Revolute Joint/Kinetically Driven Revolute_parent_offset)
        socket_child_frame=(GolfSwing3D_Kinetic/Left Elbow Joint/Revolute Joint/Kinetically Driven Revolute_child_offset)
      Coordinate LEInput: default_value=0 range=(-2.617994 0.08726646) clamped=false
      PhysicalOffsetFrame GolfSwing3D_Kinetic/Left Elbow Joint/Revolute Joint/Kinetically Driven Revolute_parent_offset: socket_parent=/bodyset/solid_reference:GolfSwing3D_Kinetic/LUpperArm
          translation=(0 0 -0.3043525)
      PhysicalOffsetFrame GolfSwing3D_Kinetic/Left Elbow Joint/Revolute Joint/Kinetically Driven Revolute_child_offset: socket_parent=(/bodyset/solid_reference:GolfSwing3D_Kinetic/Left Elbow Joint/Spherical Solid)
          translation=(0 0 0)
      SpatialTransform: axes_held_at_zero=(rotation2 rotation3 translation1 translation2 translation3)
        TransformAxis rotation1: coordinates=LEInput axis=(0 1 0) LinearFunction(coefficients=1 0)
    CustomJoint GolfSwing3D_Kinetic/Left Forearm/Revolute Joint/Kinetically Driven Revolute: socket_parent_frame=(GolfSwing3D_Kinetic/Left Forearm/Revolute Joint/Kinetically Driven Revolute_parent_offset)
        socket_child_frame=(GolfSwing3D_Kinetic/Left Forearm/Revolute Joint/Kinetically Driven Revolute_child_offset)
      Coordinate LFInput: default_value=0 range=(-1.570796 1.570796) clamped=false
      PhysicalOffsetFrame GolfSwing3D_Kinetic/Left Forearm/Revolute Joint/Kinetically Driven Revolute_parent_offset: socket_parent=(/bodyset/solid_reference:GolfSwing3D_Kinetic/Left Elbow Joint/Spherical Solid)
          translation=(0 0 -0.1452616)
      PhysicalOffsetFrame GolfSwing3D_Kinetic/Left Forearm/Revolute Joint/Kinetically Driven Revolute_child_offset: socket_parent=(/bodyset/solid_reference:GolfSwing3D_Kinetic/Left Forearm/LLowerForearm)
          translation=(0 0 0)
      SpatialTransform: axes_held_at_zero=(rotation2 rotation3 translation1 translation2 translation3)
        TransformAxis rotation1: coordinates=LFInput axis=(0 0 1) LinearFunction(coefficients=1 0)
    CustomJoint GolfSwing3D_Kinetic/Left Scapula Joint/Universal Joint/Kinetically Driven Universal Joint: socket_parent_frame=(GolfSwing3D_Kinetic/Left Scapula Joint/Universal Joint/Kinetically Driven Universal Joint_parent_offset)
        socket_child_frame=(GolfSwing3D_Kinetic/Left Scapula Joint/Universal Joint/Kinetically Driven Universal Joint_child_offset)
      Coordinate LScapInputX: default_value=0 range=(-0.1745329 0.5235988) clamped=false
      Coordinate LScapInputY: default_value=0 range=(-0.6981317 0.6981317) clamped=false
      PhysicalOffsetFrame GolfSwing3D_Kinetic/Left Scapula Joint/Universal Joint/Kinetically Driven Universal Joint_parent_offset: socket_parent=(/bodyset/solid_reference:GolfSwing3D_Kinetic/Hips and Torso Inputs/COMRod)
          translation=(0 0 0.4226109)
      PhysicalOffsetFrame GolfSwing3D_Kinetic/Left Scapula Joint/Universal Joint/Kinetically Driven Universal Joint_child_offset: socket_parent=/bodyset/solid_reference:GolfSwing3D_Kinetic/HubtoLS
          translation=(0 0 0)
      SpatialTransform: axes_held_at_zero=(rotation3 translation1 translation2 translation3)
        TransformAxis rotation1: coordinates=LScapInputX axis=(1 0 0) LinearFunction(coefficients=1 0)
        TransformAxis rotation2: coordinates=LScapInputY axis=(0 0 1) LinearFunction(coefficients=1 0)
    CustomJoint GolfSwing3D_Kinetic/Left Shoulder Joint/Gimbal Joint/Kinetically Driven: socket_parent_frame=(GolfSwing3D_Kinetic/Left Shoulder Joint/Gimbal Joint/Kinetically Driven_parent_offset)
        socket_child_frame=(GolfSwing3D_Kinetic/Left Shoulder Joint/Gimbal Joint/Kinetically Driven_child_offset)
      Coordinate LSInputX: default_value=0 range=(-3.141593 3.141593) clamped=false
      Coordinate LSInputY: default_value=0 range=(-3.141593 3.141593) clamped=false
      Coordinate LSInputZ: default_value=0 range=(-3.141593 3.141593) clamped=false
      PhysicalOffsetFrame GolfSwing3D_Kinetic/Left Shoulder Joint/Gimbal Joint/Kinetically Driven_parent_offset: socket_parent=/bodyset/solid_reference:GolfSwing3D_Kinetic/HubtoLS
          translation=(0 0.19494 0) orientation=(0 -1.570796 0)
      PhysicalOffsetFrame GolfSwing3D_Kinetic/Left Shoulder Joint/Gimbal Joint/Kinetically Driven_child_offset: socket_parent=/bodyset/solid_reference:GolfSwing3D_Kinetic/LUpperArm
          translation=(0 0 0)
      SpatialTransform: axes_held_at_zero=(translation1 translation2 translation3)
        TransformAxis rotation1: coordinates=LSInputX axis=(1 0 0) LinearFunction(coefficients=1 0)
        TransformAxis rotation2: coordinates=LSInputY axis=(0 1 0) LinearFunction(coefficients=1 0)
        TransformAxis rotation3: coordinates=LSInputZ axis=(0 0 1) LinearFunction(coefficients=1 0)
    CustomJoint GolfSwing3D_Kinetic/Left Wrist and Hand/Universal Joint/Kinetically Driven Universal Joint: socket_parent_frame=(GolfSwing3D_Kinetic/Left Wrist and Hand/Universal Joint/Kinetically Driven Universal Joint_parent_offset)
        socket_child_frame=(GolfSwing3D_Kinetic/Left Wrist and Hand/Universal Joint/Kinetically Driven Universal Joint_child_offset)
      Coordinate LWInputX: default_value=0 range=(-0.6981317 0.4363323) clamped=false
      Coordinate LWInputY: default_value=0 range=(-1.22173 1.22173) clamped=false
      PhysicalOffsetFrame GolfSwing3D_Kinetic/Left Wrist and Hand/Universal Joint/Kinetically Driven Universal Joint_parent_offset: socket_parent=(/bodyset/solid_reference:GolfSwing3D_Kinetic/Left Forearm/LLowerForearm)
          translation=(0 0 -0.1452616) orientation=(-1.570796 2.220446e-16 -1.570796)
      PhysicalOffsetFrame GolfSwing3D_Kinetic/Left Wrist and Hand/Universal Joint/Kinetically Driven Universal Joint_child_offset: socket_parent=(/bodyset/solid_reference:GolfSwing3D_Kinetic/Club/Clubface Vector)
          translation=(-0.02501412 -1.124 0.05908934) orientation=(1.451629 0.9055046 2.617172)
      SpatialTransform: axes_held_at_zero=(rotation3 translation1 translation2 translation3)
        TransformAxis rotation1: coordinates=LWInputX axis=(1 0 0) LinearFunction(coefficients=1 0)
        TransformAxis rotation2: coordinates=LWInputY axis=(0 0 1) LinearFunction(coefficients=1 0)
    CustomJoint GolfSwing3D_Kinetic/Right Elbow Joint/Revolute Joint/Kinetically Driven Revolute: socket_parent_frame=(GolfSwing3D_Kinetic/Right Elbow Joint/Revolute Joint/Kinetically Driven Revolute_parent_offset)
        socket_child_frame=(GolfSwing3D_Kinetic/Right Elbow Joint/Revolute Joint/Kinetically Driven Revolute_child_offset)
      Coordinate REInput: default_value=0 range=(-2.617994 0.08726646) clamped=false
      PhysicalOffsetFrame GolfSwing3D_Kinetic/Right Elbow Joint/Revolute Joint/Kinetically Driven Revolute_parent_offset: socket_parent=/bodyset/solid_reference:GolfSwing3D_Kinetic/RUpperArm
          translation=(0 0 -0.3043525)
      PhysicalOffsetFrame GolfSwing3D_Kinetic/Right Elbow Joint/Revolute Joint/Kinetically Driven Revolute_child_offset: socket_parent=(/bodyset/solid_reference:GolfSwing3D_Kinetic/Right Elbow Joint/Spherical Solid1)
          translation=(0 0 0)
      SpatialTransform: axes_held_at_zero=(rotation2 rotation3 translation1 translation2 translation3)
        TransformAxis rotation1: coordinates=REInput axis=(0 1 0) LinearFunction(coefficients=1 0)
    CustomJoint GolfSwing3D_Kinetic/Right Forearm/Revolute Joint/Kinetically Driven Revolute: socket_parent_frame=(GolfSwing3D_Kinetic/Right Forearm/Revolute Joint/Kinetically Driven Revolute_parent_offset)
        socket_child_frame=(GolfSwing3D_Kinetic/Right Forearm/Revolute Joint/Kinetically Driven Revolute_child_offset)
      Coordinate RFInput: default_value=0 range=(-1.570796 1.570796) clamped=false
      PhysicalOffsetFrame GolfSwing3D_Kinetic/Right Forearm/Revolute Joint/Kinetically Driven Revolute_parent_offset: socket_parent=(/bodyset/solid_reference:GolfSwing3D_Kinetic/Right Elbow Joint/Spherical Solid1)
          translation=(0 0 -0.1452616)
      PhysicalOffsetFrame GolfSwing3D_Kinetic/Right Forearm/Revolute Joint/Kinetically Driven Revolute_child_offset: socket_parent=(/bodyset/solid_reference:GolfSwing3D_Kinetic/Right Forearm/RLowerForearm)
          translation=(0 0 0)
      SpatialTransform: axes_held_at_zero=(rotation2 rotation3 translation1 translation2 translation3)
        TransformAxis rotation1: coordinates=RFInput axis=(0 0 1) LinearFunction(coefficients=1 0)
    CustomJoint GolfSwing3D_Kinetic/Right Scapula Joint/Universal Joint/Kinetically Driven Universal Joint: socket_parent_frame=(GolfSwing3D_Kinetic/Right Scapula Joint/Universal Joint/Kinetically Driven Universal Joint_parent_offset)
        socket_child_frame=(GolfSwing3D_Kinetic/Right Scapula Joint/Universal Joint/Kinetically Driven Universal Joint_child_offset)
      Coordinate RScapInputX: default_value=0 range=(-0.5235988 0.1745329) clamped=false
      Coordinate RScapInputY: default_value=0 range=(-0.6981317 0.6981317) clamped=false
      PhysicalOffsetFrame GolfSwing3D_Kinetic/Right Scapula Joint/Universal Joint/Kinetically Driven Universal Joint_parent_offset: socket_parent=(/bodyset/solid_reference:GolfSwing3D_Kinetic/Hips and Torso Inputs/COMRod)
          translation=(0 0 0.4226109)
      PhysicalOffsetFrame GolfSwing3D_Kinetic/Right Scapula Joint/Universal Joint/Kinetically Driven Universal Joint_child_offset: socket_parent=/bodyset/solid_reference:GolfSwing3D_Kinetic/HubtoRS
          translation=(0 0 0)
      SpatialTransform: axes_held_at_zero=(rotation3 translation1 translation2 translation3)
        TransformAxis rotation1: coordinates=RScapInputX axis=(1 0 0) LinearFunction(coefficients=1 0)
        TransformAxis rotation2: coordinates=RScapInputY axis=(0 0 1) LinearFunction(coefficients=1 0)
    CustomJoint GolfSwing3D_Kinetic/Right Shoulder Joint/Gimbal Joint/Kinetically Driven: socket_parent_frame=(GolfSwing3D_Kinetic/Right Shoulder Joint/Gimbal Joint/Kinetically Driven_parent_offset)
        socket_child_frame=(GolfSwing3D_Kinetic/Right Shoulder Joint/Gimbal Joint/Kinetically Driven_child_offset)
      Coordinate RSInputX: default_value=0 range=(-3.141593 3.141593) clamped=false
      Coordinate RSInputY: default_value=0 range=(-3.141593 3.141593) clamped=false
      Coordinate RSInputZ: default_value=0 range=(-3.141593 3.141593) clamped=false
      PhysicalOffsetFrame GolfSwing3D_Kinetic/Right Shoulder Joint/Gimbal Joint/Kinetically Driven_parent_offset: socket_parent=/bodyset/solid_reference:GolfSwing3D_Kinetic/HubtoRS
          translation=(0 -0.19494 0) orientation=(0 -1.570796 0)
      PhysicalOffsetFrame GolfSwing3D_Kinetic/Right Shoulder Joint/Gimbal Joint/Kinetically Driven_child_offset: socket_parent=/bodyset/solid_reference:GolfSwing3D_Kinetic/RUpperArm
          translation=(0 0 0)
      SpatialTransform: axes_held_at_zero=(translation1 translation2 translation3)
        TransformAxis rotation1: coordinates=RSInputX axis=(1 0 0) LinearFunction(coefficients=1 0)
        TransformAxis rotation2: coordinates=RSInputY axis=(0 1 0) LinearFunction(coefficients=1 0)
        TransformAxis rotation3: coordinates=RSInputZ axis=(0 0 1) LinearFunction(coefficients=1 0)
    CustomJoint GolfSwing3D_Kinetic/Right Wrist and Hand/Universal Joint/Kinetically Driven Universal Joint: socket_parent_frame=(GolfSwing3D_Kinetic/Right Wrist and Hand/Universal Joint/Kinetically Driven Universal Joint_parent_offset)
        socket_child_frame=(GolfSwing3D_Kinetic/Right Wrist and Hand/Universal Joint/Kinetically Driven Universal Joint_child_offset)
      Coordinate RWInputX: default_value=0 range=(-0.6981317 0.4363323) clamped=false
      Coordinate RWInputY: default_value=0 range=(-1.22173 1.22173) clamped=false
      PhysicalOffsetFrame GolfSwing3D_Kinetic/Right Wrist and Hand/Universal Joint/Kinetically Driven Universal Joint_parent_offset: socket_parent=(/bodyset/solid_reference:GolfSwing3D_Kinetic/Right Forearm/RLowerForearm)
          translation=(0 0 -0.1452616) orientation=(-1.570796 2.220446e-16 -1.570796)
      PhysicalOffsetFrame GolfSwing3D_Kinetic/Right Wrist and Hand/Universal Joint/Kinetically Driven Universal Joint_child_offset: socket_parent=/bodyset/solid_reference:GolfSwing3D_Kinetic/Grip/RHandStandoff
          translation=(0 0 0.0127) orientation=(2.765632 -0.4036 0.3625018)
      SpatialTransform: axes_held_at_zero=(rotation3 translation1 translation2 translation3)
        TransformAxis rotation1: coordinates=RWInputX axis=(1 0 0) LinearFunction(coefficients=1 0)
        TransformAxis rotation2: coordinates=RWInputY axis=(0 0 1) LinearFunction(coefficients=1 0)
    CustomJoint GolfSwing3D_Kinetic/Neck Joint: socket_parent_frame=(GolfSwing3D_Kinetic/Neck Joint_parent_offset)
        socket_child_frame=(GolfSwing3D_Kinetic/Neck Joint_child_offset)
      Coordinate NeckInputX: default_value=0 range=(-0.7853982 0.7853982) clamped=false
      Coordinate NeckInputY: default_value=0 range=(-1.047198 1.047198) clamped=false
      Coordinate NeckInputZ: default_value=0 range=(-1.396263 1.396263) clamped=false
      PhysicalOffsetFrame GolfSwing3D_Kinetic/Neck Joint_parent_offset: socket_parent=(/bodyset/solid_reference:GolfSwing3D_Kinetic/Hips and Torso Inputs/COMRod)
          translation=(0 0 0.4626109)
      PhysicalOffsetFrame GolfSwing3D_Kinetic/Neck Joint_child_offset: socket_parent=/bodyset/GolfSwing3D_Kinetic/Head
          translation=(0 0 0)
      SpatialTransform: axes_held_at_zero=(translation1 translation2 translation3)
        TransformAxis rotation1: coordinates=NeckInputX axis=(1 0 0) LinearFunction(coefficients=1 0)
        TransformAxis rotation2: coordinates=NeckInputY axis=(0 1 0) LinearFunction(coefficients=1 0)
        TransformAxis rotation3: coordinates=NeckInputZ axis=(0 0 1) LinearFunction(coefficients=1 0)
    CustomJoint hip_r: socket_parent_frame=hip_r_parent_offset socket_child_frame=hip_r_child_offset
      Coordinate hip_flexion_r: default_value=0 range=(-0.5235988 2.094395) clamped=false
      Coordinate hip_adduction_r: default_value=0 range=(-0.8726646 0.5235988) clamped=false
      Coordinate hip_rotation_r: default_value=0 range=(-0.6981317 0.6981317) clamped=false
      PhysicalOffsetFrame hip_r_parent_offset: socket_parent=(/bodyset/solid_reference:GolfSwing3D_Kinetic/Hips and Torso Inputs/LowerTorso)
          translation=(0 -0.08892 0) orientation=(0 0 -1.570796)
      PhysicalOffsetFrame hip_r_child_offset: socket_parent=/bodyset/femur_r translation=(0 0 0)
          orientation=(-1.570796 -1.570796 0)
      SpatialTransform: axes_held_at_zero=(translation1 translation2 translation3)
        TransformAxis rotation1: coordinates=hip_flexion_r axis=(1 0 0) LinearFunction(coefficients=1 0)
        TransformAxis rotation2: coordinates=hip_adduction_r axis=(0 1 0) LinearFunction(coefficients=1 0)
        TransformAxis rotation3: coordinates=hip_rotation_r axis=(0 0 1) LinearFunction(coefficients=1 0)
    CustomJoint knee_r: socket_parent_frame=knee_r_parent_offset socket_child_frame=knee_r_child_offset
      Coordinate knee_angle_r: default_value=0 range=(-2.094395 0.1745329) clamped=false
      PhysicalOffsetFrame knee_r_parent_offset: socket_parent=/bodyset/femur_r
          translation=(-0.00803206 -0.405038 -0.00273031) orientation=(-3.132781 0.07022027 1.695722)
      PhysicalOffsetFrame knee_r_child_offset: socket_parent=/bodyset/tibia_r
          translation=(-0.00830356 -0.00387542 -0.00152402) orientation=(-3.132781 0.07022027 1.695722)
      SpatialTransform: axes_held_at_zero=(rotation2 rotation3 translation1 translation2 translation3)
        TransformAxis rotation1: coordinates=knee_angle_r axis=(0 0 1) LinearFunction(coefficients=1 0)
    CustomJoint ankle_r: socket_parent_frame=ankle_r_parent_offset socket_child_frame=ankle_r_child_offset
      Coordinate ankle_angle_r: default_value=0 range=(-0.6981317 0.5235988) clamped=false
      PhysicalOffsetFrame ankle_r_parent_offset: socket_parent=/bodyset/tibia_r translation=(-0.0102646 -0.438544 0)
          orientation=(0.1749124 -0.1068443 4.150603e-8)
      PhysicalOffsetFrame ankle_r_child_offset: socket_parent=/bodyset/talus_r translation=(0 0 0)
          orientation=(0.1749124 -0.1068443 4.150603e-8)
      SpatialTransform: axes_held_at_zero=(rotation2 rotation3 translation1 translation2 translation3)
        TransformAxis rotation1: coordinates=ankle_angle_r axis=(0 0 1) LinearFunction(coefficients=1 0)
    CustomJoint subtalar_r: socket_parent_frame=subtalar_r_parent_offset socket_child_frame=subtalar_r_child_offset
      Coordinate subtalar_angle_r: default_value=0 range=(-0.3490659 0.3490659) clamped=false
      PhysicalOffsetFrame subtalar_r_parent_offset: socket_parent=/bodyset/talus_r
          translation=(-0.0442039 -0.04195 0.00812953) orientation=(2.492149 1.418342 -3.141588)
      PhysicalOffsetFrame subtalar_r_child_offset: socket_parent=/bodyset/calcn_r translation=(0 0 0)
          orientation=(2.492149 1.418342 -3.141588)
      SpatialTransform: axes_held_at_zero=(rotation2 rotation3 translation1 translation2 translation3)
        TransformAxis rotation1: coordinates=subtalar_angle_r axis=(0 0 1) LinearFunction(coefficients=1 0)
    CustomJoint mtp_r: socket_parent_frame=mtp_r_parent_offset socket_child_frame=mtp_r_child_offset
      Coordinate mtp_angle_r: default_value=0 range=(-0.5235988 0.5235988) clamped=false
      PhysicalOffsetFrame mtp_r_parent_offset: socket_parent=/bodyset/calcn_r translation=(0.16206 -0.002 0.00110857)
          orientation=(-3.141589 -0.619901 -1.894025e-6)
      PhysicalOffsetFrame mtp_r_child_offset: socket_parent=/bodyset/toes_r translation=(0 0 0)
          orientation=(-3.141589 -0.619901 -1.894025e-6)
      SpatialTransform: axes_held_at_zero=(rotation2 rotation3 translation1 translation2 translation3)
        TransformAxis rotation1: coordinates=mtp_angle_r axis=(0 0 1) LinearFunction(coefficients=1 0)
    CustomJoint hip_l: socket_parent_frame=hip_l_parent_offset socket_child_frame=hip_l_child_offset
      Coordinate hip_flexion_l: default_value=0 range=(-0.5235988 2.094395) clamped=false
      Coordinate hip_adduction_l: default_value=0 range=(-0.8726646 0.5235988) clamped=false
      Coordinate hip_rotation_l: default_value=0 range=(-0.6981317 0.6981317) clamped=false
      PhysicalOffsetFrame hip_l_parent_offset: socket_parent=(/bodyset/solid_reference:GolfSwing3D_Kinetic/Hips and Torso Inputs/LowerTorso)
          translation=(0 0.08892 0) orientation=(0 0 -1.570796)
      PhysicalOffsetFrame hip_l_child_offset: socket_parent=/bodyset/femur_l translation=(0 0 0)
          orientation=(-1.570796 -1.570796 0)
      SpatialTransform: axes_held_at_zero=(translation1 translation2 translation3)
        TransformAxis rotation1: coordinates=hip_flexion_l axis=(1 0 0) LinearFunction(coefficients=1 0)
        TransformAxis rotation2: coordinates=hip_adduction_l axis=(0 1 0) LinearFunction(coefficients=1 0)
        TransformAxis rotation3: coordinates=hip_rotation_l axis=(0 0 1) LinearFunction(coefficients=1 0)
    CustomJoint knee_l: socket_parent_frame=knee_l_parent_offset socket_child_frame=knee_l_child_offset
      Coordinate knee_angle_l: default_value=0 range=(-2.094395 0.1745329) clamped=false
      PhysicalOffsetFrame knee_l_parent_offset: socket_parent=/bodyset/femur_l
          translation=(-0.00779732 -0.393201 0.00265051) orientation=(-0.008811233 -0.07022027 1.695722)
      PhysicalOffsetFrame knee_l_child_offset: socket_parent=/bodyset/tibia_l
          translation=(-0.00828216 -0.00383839 0.00152009) orientation=(-0.008811233 -0.07022027 1.695722)
      SpatialTransform: axes_held_at_zero=(rotation2 rotation3 translation1 translation2 translation3)
        TransformAxis rotation1: coordinates=knee_angle_l axis=(0 0 1) LinearFunction(coefficients=1 0)
    CustomJoint ankle_l: socket_parent_frame=ankle_l_parent_offset socket_child_frame=ankle_l_child_offset
      Coordinate ankle_angle_l: default_value=0 range=(-0.6981317 0.5235988) clamped=false
      PhysicalOffsetFrame ankle_l_parent_offset: socket_parent=/bodyset/tibia_l translation=(-0.0102381 -0.434354 0)
          orientation=(-0.1749124 0.1068443 4.150603e-8)
      PhysicalOffsetFrame ankle_l_child_offset: socket_parent=/bodyset/talus_l translation=(0 0 0)
          orientation=(-0.1749124 0.1068443 4.150603e-8)
      SpatialTransform: axes_held_at_zero=(rotation2 rotation3 translation1 translation2 translation3)
        TransformAxis rotation1: coordinates=ankle_angle_l axis=(0 0 1) LinearFunction(coefficients=1 0)
    CustomJoint subtalar_l: socket_parent_frame=subtalar_l_parent_offset socket_child_frame=subtalar_l_child_offset
      Coordinate subtalar_angle_l: default_value=0 range=(-0.3490659 0.3490659) clamped=false
      PhysicalOffsetFrame subtalar_l_parent_offset: socket_parent=/bodyset/talus_l
          translation=(-0.0436964 -0.04195 -0.00810858) orientation=(-2.492149 -1.418342 -3.141588)
      PhysicalOffsetFrame subtalar_l_child_offset: socket_parent=/bodyset/calcn_l translation=(0 0 0)
          orientation=(-2.492149 -1.418342 -3.141588)
      SpatialTransform: axes_held_at_zero=(rotation2 rotation3 translation1 translation2 translation3)
        TransformAxis rotation1: coordinates=subtalar_angle_l axis=(0 0 1) LinearFunction(coefficients=1 0)
    CustomJoint mtp_l: socket_parent_frame=mtp_l_parent_offset socket_child_frame=mtp_l_child_offset
      Coordinate mtp_angle_l: default_value=0 range=(-0.5235988 0.5235988) clamped=false
      PhysicalOffsetFrame mtp_l_parent_offset: socket_parent=/bodyset/calcn_l translation=(0.160199 -0.002 -0.00110572)
          orientation=(-3.141589 0.619901 1.894025e-6)
      PhysicalOffsetFrame mtp_l_child_offset: socket_parent=/bodyset/toes_l translation=(0 0 0)
          orientation=(-3.141589 0.619901 1.894025e-6)
      SpatialTransform: axes_held_at_zero=(rotation2 rotation3 translation1 translation2 translation3)
        TransformAxis rotation1: coordinates=mtp_angle_l axis=(0 0 1) LinearFunction(coefficients=1 0)
  ConstraintSet:
    WeldConstraint two_hand_grip_closure: socket_frame1=closure_frame_a socket_frame2=closure_frame_b
      PhysicalOffsetFrame closure_frame_a: socket_parent=/bodyset/solid_reference:GolfSwing3D_Kinetic/Grip/RHandStandoff
          translation=(0 0 -0.0127)
      PhysicalOffsetFrame closure_frame_b: socket_parent=(/bodyset/solid_reference:GolfSwing3D_Kinetic/Club/Clubface Vector)
          translation=(0 -1.0478 0.0635) orientation=(-1.745329 0 1.570796)
  ForceSet:
    HuntCrossleyForce contact_heel_r: transition_velocity=0.05
      contact_parameters: ContactParameters: geometry=(ground_plane contact_geom_heel_r) stiffness=50000 dissipation=2
          static_friction=0.9 dynamic_friction=0.8 viscous_friction=0
    HuntCrossleyForce contact_forefoot_r: transition_velocity=0.05
      contact_parameters: ContactParameters: geometry=(ground_plane contact_geom_forefoot_r) stiffness=50000
          dissipation=2 static_friction=0.9 dynamic_friction=0.8 viscous_friction=0
    HuntCrossleyForce contact_toe_r: transition_velocity=0.05
      contact_parameters: ContactParameters: geometry=(ground_plane contact_geom_toe_r) stiffness=50000 dissipation=2
          static_friction=0.9 dynamic_friction=0.8 viscous_friction=0
    HuntCrossleyForce contact_heel_l: transition_velocity=0.05
      contact_parameters: ContactParameters: geometry=(ground_plane contact_geom_heel_l) stiffness=50000 dissipation=2
          static_friction=0.9 dynamic_friction=0.8 viscous_friction=0
    HuntCrossleyForce contact_forefoot_l: transition_velocity=0.05
      contact_parameters: ContactParameters: geometry=(ground_plane contact_geom_forefoot_l) stiffness=50000
          dissipation=2 static_friction=0.9 dynamic_friction=0.8 viscous_friction=0
    HuntCrossleyForce contact_toe_l: transition_velocity=0.05
      contact_parameters: ContactParameters: geometry=(ground_plane contact_geom_toe_l) stiffness=50000 dissipation=2
          static_friction=0.9 dynamic_friction=0.8 viscous_friction=0
    CoordinateActuator tau_SpineInputX: coordinate=SpineInputX optimal_force=1
    CoordinateActuator tau_SpineInputY: coordinate=SpineInputY optimal_force=1
    CoordinateActuator tau_TorsoInput: coordinate=TorsoInput optimal_force=1
    CoordinateActuator tau_LEInput: coordinate=LEInput optimal_force=1
    CoordinateActuator tau_LFInput: coordinate=LFInput optimal_force=1
    CoordinateActuator tau_LScapInputX: coordinate=LScapInputX optimal_force=1
    CoordinateActuator tau_LScapInputY: coordinate=LScapInputY optimal_force=1
    CoordinateActuator tau_LSInputX: coordinate=LSInputX optimal_force=1
    CoordinateActuator tau_LSInputY: coordinate=LSInputY optimal_force=1
    CoordinateActuator tau_LSInputZ: coordinate=LSInputZ optimal_force=1
    CoordinateActuator tau_LWInputX: coordinate=LWInputX optimal_force=1
    CoordinateActuator tau_LWInputY: coordinate=LWInputY optimal_force=1
    CoordinateActuator tau_REInput: coordinate=REInput optimal_force=1
    CoordinateActuator tau_RFInput: coordinate=RFInput optimal_force=1
    CoordinateActuator tau_RScapInputX: coordinate=RScapInputX optimal_force=1
    CoordinateActuator tau_RScapInputY: coordinate=RScapInputY optimal_force=1
    CoordinateActuator tau_RSInputX: coordinate=RSInputX optimal_force=1
    CoordinateActuator tau_RSInputY: coordinate=RSInputY optimal_force=1
    CoordinateActuator tau_RSInputZ: coordinate=RSInputZ optimal_force=1
    CoordinateActuator tau_RWInputX: coordinate=RWInputX optimal_force=1
    CoordinateActuator tau_RWInputY: coordinate=RWInputY optimal_force=1
    CoordinateActuator tau_NeckInputX: coordinate=NeckInputX optimal_force=1
    CoordinateActuator tau_NeckInputY: coordinate=NeckInputY optimal_force=1
    CoordinateActuator tau_NeckInputZ: coordinate=NeckInputZ optimal_force=1
    CoordinateActuator tau_hip_flexion_r: coordinate=hip_flexion_r optimal_force=1
    CoordinateActuator tau_hip_adduction_r: coordinate=hip_adduction_r optimal_force=1
    CoordinateActuator tau_hip_rotation_r: coordinate=hip_rotation_r optimal_force=1
    CoordinateActuator tau_knee_angle_r: coordinate=knee_angle_r optimal_force=1
    CoordinateActuator tau_ankle_angle_r: coordinate=ankle_angle_r optimal_force=1
    CoordinateActuator tau_subtalar_angle_r: coordinate=subtalar_angle_r optimal_force=1
    CoordinateActuator tau_mtp_angle_r: coordinate=mtp_angle_r optimal_force=1
    CoordinateActuator tau_hip_flexion_l: coordinate=hip_flexion_l optimal_force=1
    CoordinateActuator tau_hip_adduction_l: coordinate=hip_adduction_l optimal_force=1
    CoordinateActuator tau_hip_rotation_l: coordinate=hip_rotation_l optimal_force=1
    CoordinateActuator tau_knee_angle_l: coordinate=knee_angle_l optimal_force=1
    CoordinateActuator tau_ankle_angle_l: coordinate=ankle_angle_l optimal_force=1
    CoordinateActuator tau_subtalar_angle_l: coordinate=subtalar_angle_l optimal_force=1
    CoordinateActuator tau_mtp_angle_l: coordinate=mtp_angle_l optimal_force=1
  MarkerSet:
    Marker BackLeft: Spine (-0.11 0.09 0.2958277)
    Marker BackRight: Spine (-0.11 -0.09 0.2958277)
    Marker BackTop: Spine (-0.1 0 0.4426109)
    Marker HeadFront: Head (0.1 0 0.16)
    Marker HeadSide: Head (0 0.08 0.16)
    Marker HeadTop: Head (0 0 0.24)
    Marker LAnkleOut: tibia_l (0 0 0)
    Marker LElbowOut: LS (0 0.04 -0.3043525)
    Marker LKneeOut: femur_l (0 0 0)
    Marker LShoulderBack: LScap (-0.06 0.18494 0.02)
    Marker LShoulderTop: LScap (0 0.19494 0.05)
    Marker LToeIn: calcn_l (0 0 0)
    Marker LToeOut: calcn_l (0 0 0)
    Marker LUArmHigh: LS (0.01 0.04 -0.1065234)
    Marker LWristTop: LF (0.03 0 -0.1352616)
    Marker Marker_2:2:1: Clubhead (-0.005013763 -0.04723805 -0.02042231)
    Marker Marker_2:2:2: Clubhead (0.03976475 0.03354093 -0.0215345)
    Marker Marker_2:2:3: Clubhead (0.05213034 0.01453598 0.0253241)
    Marker Marker_3:3:1: Clubhead (-0.688957 -0.0798125 -0.03942722)
    Marker Marker_3:3:2: Clubhead (-0.7606918 -0.07648041 -0.003246789)
    Marker Marker_3:3:3: Clubhead (-0.8101015 -0.08113826 -0.03508186)
    Marker RAnkleOut: tibia_r (0 0 0)
    Marker RElbowOut: RS (0 -0.04 -0.3043525)
    Marker RKneeOut: femur_r (0 0 0)
    Marker RShoulderBack: RScap (-0.06 -0.18494 0.02)
    Marker RShoulderTop: RScap (0 -0.19494 0.05)
    Marker RToeIn: calcn_r (0 0 0)
    Marker RToeOut: calcn_r (0 0 0)
    Marker RUArmHigh: RS (0.01 -0.04 -0.1065234)
    Marker RWristTop: RF (0.03 0 -0.1352616)
    Marker WaistLBack: Hip (-0.1 0.07 0.1)
    Marker WaistLeft: Hip (0.02 0.15 0.08)
    Marker WaistRBack: Hip (-0.1 -0.07 0.1)
    Marker WaistRight: Hip (0.02 -0.15 0.08)
  ContactGeometrySet:
    ContactHalfSpace ground_plane: socket_frame=/ground location=(0 0 0) orientation=(0 0 -1.570796)
    ContactSphere contact_geom_heel_r: socket_frame=/bodyset/calcn_r location=(0.01 -0.005 0) radius=0.035
    ContactSphere contact_geom_forefoot_r: socket_frame=/bodyset/calcn_r location=(0.16 -0.005 0) radius=0.03
    ContactSphere contact_geom_toe_r: socket_frame=/bodyset/calcn_r location=(0.23 -0.01 0) radius=0.025
    ContactSphere contact_geom_heel_l: socket_frame=/bodyset/calcn_l location=(0.01 -0.005 0) radius=0.035
    ContactSphere contact_geom_forefoot_l: socket_frame=/bodyset/calcn_l location=(0.16 -0.005 0) radius=0.03
    ContactSphere contact_geom_toe_l: socket_frame=/bodyset/calcn_l location=(0.23 -0.01 0) radius=0.025
