# OpenSim document version 40000
Model golf_humanoid:
  gravity: 0 -9.80665 0
  length_units: meters
  force_units: N
  credits:
    Rajagopal, A, Dembia, C.L., DeMers, M.S., Delp, D.D., Hicks, J.L., and Delp, S.L.
  publications:
    Rajagopal, Apoorva, et al. "Full-Body Musculoskeletal Model for Muscle-Driven Simulation of Human Gait." IEEE Transactions on Biomedical Engineering 63.10 (2016): 2068-2079. (2016)
  Ground
  BodySet:
    Body pelvis: mass=12.40882 mass_center=(-0.0806358 0 0) inertia=(0.114711 0.114711 0.0711124 0 0 0)
        meshes=(r_pelvis.vtp l_pelvis.vtp sacrum.vtp)
      WrapCylinder Gmax1_at_pelvis_r: xyz_body_rotation=(-0.6 0.45 0) translation=(-0.0878212 -0.101181 0.0615241)
          quadrant=-x radius=0.04270535 length=0.1557372
      WrapCylinder Gmax2_at_pelvis_r: xyz_body_rotation=(-0.75 0.39 0) translation=(-0.0912428 -0.0848283 0.0685843)
          quadrant=all radius=0.0427809 length=0.1033967
      WrapCylinder Gmax3_at_pelvis_r: xyz_body_rotation=(-0.1 0 0) translation=(-0.0946644 -0.0899384 0.0685843)
          quadrant=all radius=0.04324857 length=0.1008727
      WrapCylinder Gmax1_at_pelvis_l: xyz_body_rotation=(0.6 -0.45 0) translation=(-0.0878212 -0.101181 -0.0615241)
          quadrant=-x radius=0.04270535 length=0.1557372
      WrapCylinder Gmax2_at_pelvis_l: xyz_body_rotation=(0.75 -0.39 0) translation=(-0.0912428 -0.0848283 -0.0685843)
          quadrant=all radius=0.0427809 length=0.1033967
      WrapCylinder Gmax3_at_pelvis_l: xyz_body_rotation=(0.1 0 0) translation=(-0.0946644 -0.0899384 -0.0685843)
          quadrant=all radius=0.04324857 length=0.1008727
      WrapCylinder PS_at_brim_r: xyz_body_rotation=(-0.25 -0.27 0.1) translation=(-0.0843996 -0.0613216 0.0661636)
          quadrant=-y radius=0.05382535 length=0.1019305
      WrapCylinder PS_at_brim_l: xyz_body_rotation=(0.25 0.27 0.1) translation=(-0.0843996 -0.0613216 -0.0661636)
          quadrant=-y radius=0.05382535 length=0.1019305
      WrapCylinder IL_at_brim_r: xyz_body_rotation=(-0.32 -0.24 0.9) translation=(-0.0809779 -0.0664318 0.0762496)
          quadrant=-y radius=0.05921195 length=0.1017756
      WrapCylinder IL_at_brim_l: xyz_body_rotation=(0.32 0.24 0.9) translation=(-0.0809779 -0.0664318 -0.0762496)
          quadrant=-y radius=0.05921195 length=0.1017756
    Body femur_r: mass=9.800404 mass_center=(0 -0.1674704 0) inertia=(0.1369154 0.03589041 0.14438 0 0 0)
        meshes=femur_r.vtp
      WrapCylinder Gastroc_at_condyles_r: translation=(0.00496419 -0.407064 0) quadrant=all radius=0.02482096
          length=0.09928386
      WrapCylinder KnExt_at_fem_r: xyz_body_rotation=(-0.0623366 0.0507601 0)
          translation=(0.00356258 -0.399848 0.00207613) quadrant=all radius=0.02482096 length=0.09928386
      WrapCylinder AB_at_femshaft_r: xyz_body_rotation=(1.66157 0.186644 0) translation=(0.0145385 -0.111789 0.0231977)
          quadrant=all radius=0.01638184 length=0.0694987
      WrapCylinder AL_at_femshaft_r: xyz_body_rotation=(1.77711 0.136489 0) translation=(0.0305126 -0.230248 0.0150055)
          quadrant=all radius=0.01995606 length=0.09928386
      WrapCylinder AMprox_at_femshaft_r: xyz_body_rotation=(1.61126 0.18656 0)
          translation=(0.00514587 -0.0723728 0.0252211) quadrant=all radius=0.02094889 length=0.0694987
      WrapCylinder AMmid_at_femshaft_r: xyz_body_rotation=(1.61139 0.13656 0)
          translation=(0.0228477 -0.15956 0.0204368) quadrant=all radius=0.02124675 length=0.1191406
      WrapCylinder AMdist_at_femshaft_r: xyz_body_rotation=(1.71188 0.186636 0)
          translation=(0.0313802 -0.258869 0.00929754) quadrant=all radius=0.02164388 length=0.1985677
      WrapCylinder AMisch_at_condyles_r: xyz_body_rotation=(1.71115 -0.463363 0)
          translation=(-0.0224889 -0.374132 -0.00313178) quadrant=all radius=0.03971354 length=0.2382813
      WrapCylinder PECT_at_femshaft_r: xyz_body_rotation=(1.81295 0.276344 0)
          translation=(0.00604215 -0.0838977 0.0302225) quadrant=all radius=0.01489258 length=0.04964193
    Body tibia_r: mass=3.906401 mass_center=(0 -0.1980083 0) inertia=(0.05935827 0.005298053 0.05935827 0 0 0)
        meshes=(tibia_r.vtp r_fibula.vtp)
      WrapCylinder GasLat_at_shank_r: xyz_body_rotation=(2.96723 -0.279725 -1.47812)
          translation=(-0.00759578 -0.0811307 -0.00338731) quadrant=-y radius=0.05832801 length=0.1028464
      WrapCylinder GasMed_at_shank_r: xyz_body_rotation=(2.96723 0.0279725 -1.47812)
          translation=(-0.00759578 -0.0811307 -0.00338731) quadrant=-y radius=0.05832235 length=0.1028628
      WrapCylinder GR_at_condyles_r: xyz_body_rotation=(0 -0.4 0) translation=(-0.00307937 -0.0219272 0) quadrant=all
          radius=0.0382107 length=0.1026456
      WrapCylinder SM_at_condyles_r: xyz_body_rotation=(0 -0.1 0) translation=(-0.00102646 -0.0219272 0) quadrant=all
          radius=0.03736157 length=0.1026456
      WrapCylinder ST_at_condyles_r: xyz_body_rotation=(0 -0.2 0) translation=(-0.00205291 -0.0224754 0) quadrant=all
          radius=0.04510985 length=0.1026456
      WrapCylinder BF_at_gastroc_r: translation=(-0.0595345 -0.0657816 0) quadrant=y radius=0.03184225 length=0.1539684
    Body patella_r: mass=0.09082448 mass_center=(0.00243858 0.0357659 0) inertia=(5.55019e-6 2.5353e-5 2.5353e-5 0 0 0)
        meshes=r_patella.vtp
    Body talus_r: mass=0.1053648 mass_center=(0 0 0) inertia=(0.00108152 0.000973557 0.000973557 0 0 0)
        meshes=r_talus.vtp
    Body calcn_r: mass=1.31706 mass_center=(0.09071269 0.03002485 0) inertia=(0.00151664 0.003532796 0.003532796 0 0 0)
        meshes=r_foot.vtp
    Body toes_r: mass=0.2282202 mass_center=(0.0313606 0.006 -0.017963)
        inertia=(0.000108152 0.000183915 0.000183915 0 0 0) meshes=r_bofoot.vtp
    Body femur_l: mass=9.800404 mass_center=(0 -0.1680895 0) inertia=(0.1379299 0.03615634 0.1454494 0 0 0)
        meshes=femur_l.vtp
      WrapCylinder Gastroc_at_condyles_l: translation=(0.00481911 -0.395167 0) quadrant=all radius=0.02409554
          length=0.09638215
      WrapCylinder KnExt_at_fem_l: xyz_body_rotation=(0.0623366 -0.0507601 0)
          translation=(0.00345846 -0.388162 -0.00201546) quadrant=all radius=0.02409554 length=0.09638215
      WrapCylinder AB_at_femshaft_l: xyz_body_rotation=(-1.66157 -0.186644 0)
          translation=(0.0141136 -0.108521 -0.0225197) quadrant=all radius=0.01590305 length=0.0674675
      WrapCylinder AL_at_femshaft_l: xyz_body_rotation=(-1.77711 -0.136489 0)
          translation=(0.0296208 -0.223519 -0.0145669) quadrant=all radius=0.01937281 length=0.09638215
      WrapCylinder AMprox_at_femshaft_l: xyz_body_rotation=(-1.61126 -0.18656 0)
          translation=(0.00499548 -0.0702576 -0.024484) quadrant=all radius=0.02033663 length=0.0674675
      WrapCylinder AMmid_at_femshaft_l: xyz_body_rotation=(-1.61139 -0.13656 0)
          translation=(0.0221799 -0.154897 -0.0198395) quadrant=all radius=0.02062578 length=0.1156586
      WrapCylinder AMdist_at_femshaft_l: xyz_body_rotation=(-1.71188 -0.186636 0)
          translation=(0.030463 -0.251303 -0.0090258) quadrant=all radius=0.02101131 length=0.1927643
      WrapCylinder AMisch_at_condyles_l: xyz_body_rotation=(-1.71115 0.463363 0)
          translation=(-0.0218316 -0.363198 0.00304025) quadrant=all radius=0.03855286 length=0.2313172
      WrapCylinder PECT_at_femshaft_l: xyz_body_rotation=(-1.81295 -0.276344 0)
          translation=(0.00586556 -0.0814457 -0.0293392) quadrant=all radius=0.01445732 length=0.04819107
    Body tibia_l: mass=3.906401 mass_center=(0 -0.1965408 0) inertia=(0.05851861 0.005293622 0.05851861 0 0 0)
        meshes=(tibia_l.vtp l_fibula.vtp)
      WrapCylinder GasLat_at_shank_l: xyz_body_rotation=(-2.96723 0.279725 -1.47812)
          translation=(-0.0075762 -0.0803555 0.00337858) quadrant=-y radius=0.05797234 length=0.1025587
      WrapCylinder GasMed_at_shank_l: xyz_body_rotation=(-2.96723 -0.0279725 -1.47812)
          translation=(-0.0075762 -0.0803555 0.00337858) quadrant=-y radius=0.05796744 length=0.1025732
      WrapCylinder GR_at_condyles_l: xyz_body_rotation=(0 0.4 0) translation=(-0.00307143 -0.0217177 0) quadrant=all
          radius=0.03797452 length=0.1023811
      WrapCylinder SM_at_condyles_l: xyz_body_rotation=(0 0.1 0) translation=(-0.00102381 -0.0217177 0) quadrant=all
          radius=0.03713064 length=0.1023811
      WrapCylinder ST_at_condyles_l: xyz_body_rotation=(0 0.2 0) translation=(-0.00204762 -0.0222606 0) quadrant=all
          radius=0.04483103 length=0.1023811
      WrapCylinder BF_at_gastroc_l: translation=(-0.059381 -0.0651531 0) quadrant=all radius=0.03164543
          length=0.1535716
    Body patella_l: mass=0.09082448 mass_center=(0.00254727 0.0373599 0)
        inertia=(6.05595e-6 2.76632e-5 2.76632e-5 0 0 0) meshes=l_patella.vtp
    Body talus_l: mass=0.1053648 mass_center=(0 0 0) inertia=(0.00107874 0.000962282 0.000962282 0 0 0)
        meshes=l_talus.vtp
    Body calcn_l: mass=1.31706 mass_center=(0.09456203 0.03166249 0)
        inertia=(0.001682251 0.003856067 0.003856067 0 0 0) meshes=l_foot.vtp
    Body toes_l: mass=0.2282202 mass_center=(0.0310005 0.006 0.0179167)
        inertia=(0.000107874 0.000180811 0.000180811 0 0 0) meshes=l_bofoot.vtp
    Body torso: mass=28.2658 mass_center=(-0.03125593 0.3504478 0) inertia=(1.931212 1.090507 1.931212 0 0 0)
        meshes=(hat_spine.vtp hat_jaw.vtp hat_skull.vtp hat_ribs_scap.vtp)
    Body humerus_r: mass=2.14154 mass_center=(0 -0.2210868 0) inertia=(0.02273536 0.007842977 0.02551973 0 0 0)
        meshes=humerus_rv.vtp
    Body ulna_r: mass=0.6400913 mass_center=(0 -0.1403068 0) inertia=(0.004229452 0.0008824441 0.004587848 0 0 0)
        meshes=ulna_rv.vtp
    Body radius_r: mass=0.6400913 mass_center=(0 -0.1403068 0) inertia=(0.004229452 0.0008824441 0.004587848 0 0 0)
        meshes=radius_rv.vtp
    Body hand_r: mass=0.4820441 mass_center=(0 -0.068095 0) inertia=(0.000939854 0.000576346 0.00141189 0 0 0)
        meshes=(pisiform_rvs.vtp lunate_rvs.vtp scaphoid_rvs.vtp triquetrum_rvs.vtp hamate_rvs.vtp capitate_rvs.vtp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)
      PhysicalOffsetFrame hand_r_grip_offset: socket_parent=.. translation=(0.02220435 -0.08493503 -7.128562e-5)
          orientation=(-1.041053 -0.1352611 -1.835016)
    Body humerus_l: mass=2.14154 mass_center=(0 -0.2045786 0) inertia=(0.0194669 0.00671546 0.02185098 0 0 0)
        meshes=humerus_lv.vtp
    Body ulna_l: mass=0.6400913 mass_center=(0 -0.1391719 0) inertia=(0.004161307 0.0008682262 0.004513928 0 0 0)
        meshes=ulna_lv.vtp
    Body radius_l: mass=0.6400913 mass_center=(0 -0.1391719 0) inertia=(0.004161307 0.0008682262 0.004513928 0 0 0)
        meshes=radius_lv.vtp
    Body hand_l: mass=0.4820441 mass_center=(0 -0.068095 0) inertia=(0.000939854 0.000576346 0.00141189 0 0 0)
        meshes=(pisiform_lvs.vtp lunate_lvs.vtp scaphoid_lvs.vtp triquetrum_lvs.vtp hamate_lvs.vtp capitate_lvs.vtp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)
      PhysicalOffsetFrame hand_l_grip_offset: socket_parent=.. translation=(0.02215713 -0.08493054 1.191455e-5)
          orientation=(0.4312477 -0.6350606 -2.042607)
    Body Club: mass=0.313 mass_center=(0 -0.2560144 0.064) inertia=(0.04967534 0.0004062294 0.04975949 0 0 0)
        meshes=(club_driver_shaft.stl club_driver_grip.stl club_driver_head.stl)
      PhysicalOffsetFrame club_grip_offset: socket_parent=.. translation=(0 -1.124 0.064)
          orientation=(-3.141593 -1.396263 -1.570796)
      PhysicalOffsetFrame club_trail_grip_offset: socket_parent=.. translation=(0 -1.0478 0.064)
          orientation=(-3.141593 -1.396263 -1.570796)
      PhysicalOffsetFrame club_head_offset: socket_parent=.. translation=(0.03432208 0.00104816 0.0195815)
  JointSet:
    CustomJoint ground_pelvis: socket_parent_frame=ground_offset socket_child_frame=pelvis_offset
      Coordinate pelvis_tilt: default_value=-0.7783627 range=(-1.570796 1.570796) clamped=false
      Coordinate pelvis_list: default_value=0.04389525 range=(-1.570796 1.570796) clamped=false
      Coordinate pelvis_rotation: default_value=-0.07239183 range=(-1.570796 1.570796) clamped=false
      Coordinate pelvis_tx: default_value=-1.078867 range=(-5 5) clamped=false
      Coordinate pelvis_ty: default_value=0.8996574 range=(-1 2) clamped=false
      Coordinate pelvis_tz: default_value=0.07313191 range=(-3 3) clamped=false
      PhysicalOffsetFrame ground_offset: socket_parent=/ground translation=(0 0 0)
      PhysicalOffsetFrame pelvis_offset: socket_parent=/bodyset/pelvis translation=(0 0 0)
      SpatialTransform:
        TransformAxis rotation1: coordinates=pelvis_tilt axis=(0 0 1) LinearFunction(coefficients=1 0)
        TransformAxis rotation2: coordinates=pelvis_list axis=(1 0 0) LinearFunction(coefficients=1 0)
        TransformAxis rotation3: coordinates=pelvis_rotation axis=(0 1 0) LinearFunction(coefficients=1 0)
        TransformAxis translation1: coordinates=pelvis_tx axis=(1 0 0) LinearFunction(coefficients=1 0)
        TransformAxis translation2: coordinates=pelvis_ty axis=(0 1 0) LinearFunction(coefficients=1 0)
        TransformAxis translation3: coordinates=pelvis_tz axis=(0 0 1) LinearFunction(coefficients=1 0)
    CustomJoint hip_r: socket_parent_frame=pelvis_offset socket_child_frame=femur_r_offset
      Coordinate hip_flexion_r: default_value=0.8119001 range=(-0.5235988 2.094395) clamped=true
      Coordinate hip_adduction_r: default_value=-0.1489246 range=(-0.8726646 0.5235988) clamped=true
      Coordinate hip_rotation_r: default_value=-0.06811171 range=(-0.6981317 0.6981317) clamped=true
      PhysicalOffsetFrame pelvis_offset: socket_parent=/bodyset/pelvis translation=(-0.0641847 -0.0802189 0.0779238)
      PhysicalOffsetFrame femur_r_offset: socket_parent=/bodyset/femur_r translation=(0 0 0)
      SpatialTransform: axes_held_at_zero=(translation1 translation2 translation3)
        TransformAxis rotation1: coordinates=hip_flexion_r axis=(0 0 1) LinearFunction(coefficients=1 0)
        TransformAxis rotation2: coordinates=hip_adduction_r axis=(1 0 0) LinearFunction(coefficients=1 0)
        TransformAxis rotation3: coordinates=hip_rotation_r axis=(0 1 0) LinearFunction(coefficients=1 0)
    CustomJoint walker_knee_r: socket_parent_frame=femur_r_offset socket_child_frame=tibia_r_offset
      Coordinate knee_angle_r: default_value=8.778673e-26 range=(0 2.0944) clamped=true
      PhysicalOffsetFrame femur_r_offset: socket_parent=/bodyset/femur_r
          translation=(-0.007969598 -0.4018882 -0.002709078) orientation=(-1.64157 1.44618 1.5708)
      PhysicalOffsetFrame tibia_r_offset: socket_parent=/bodyset/tibia_r
          translation=(-0.008032469 -0.003748897 -0.001474264) orientation=(-1.64157 1.44618 1.5708)
      SpatialTransform: axes_held_at_zero=translation3
        TransformAxis rotation1: coordinates=knee_angle_r axis=(1 0 0) LinearFunction(coefficients=1 0)
        TransformAxis rotation2: coordinates=knee_angle_r axis=(0 0 1)
          SimmSpline: x=(0 0.174533 0.349066 0.523599 0.698132 0.872665 1.0472 1.22173 1.39626 1.5708 1.74533 1.91986 2.0944)
              y=(0 0.0126809 0.0226969 0.0296054 0.0332049 0.0335354 0.0308779 0.0257548 0.0189295 0.011407 0.00443314 -0.00050475 -0.0016782)
        TransformAxis rotation3: coordinates=knee_angle_r axis=(0 1 0)
          SimmSpline: x=(0 0.174533 0.349066 0.523599 0.698132 0.872665 1.0472 1.22173 1.39626 1.5708 1.74533 1.91986 2.0944)
              y=(0 0.059461 0.109399 0.150618 0.18392 0.210107 0.229983 0.24435 0.254012 0.25977 0.262428 0.262788 0.261654)
        TransformAxis translation1: coordinates=knee_angle_r axis=(0 1 0)
          MultiplierFunction: scale=0.9928386
            SimmSpline: x=(0 0.174533 0.349066 0.523599 0.698132 0.872665 1.0472 1.22173 1.39626 1.5708 1.74533 1.91986 2.0944)
                y=(0 0.000479 0.000835 0.001086 0.001251 0.001346 0.001391 0.001403 0.0014 0.0014 0.001421 0.001481 0.001599)
        TransformAxis translation2: coordinates=knee_angle_r axis=(0 0 1)
          MultiplierFunction: scale=0.9928386
            SimmSpline: x=(0 0.174533 0.349066 0.523599 0.698132 0.872665 1.0472 1.22173 1.39626 1.5708 1.74533 1.91986 2.0944)
                y=(0 0.000988 0.001899 0.002734 0.003492 0.004173 0.004777 0.005305 0.005756 0.00613 0.006427 0.006648 0.006792)
    CustomJoint patellofemoral_r: socket_parent_frame=femur_r_offset socket_child_frame=patella_r_offset
      Coordinate knee_angle_r_beta: default_value=0 range=(-99999.9 99999.9) clamped=false
          is_free_to_satisfy_constraints=true
      PhysicalOffsetFrame femur_r_offset: socket_parent=/bodyset/femur_r
          translation=(-0.007969598 -0.4018882 -0.002709078)
      PhysicalOffsetFrame patella_r_offset: socket_parent=/bodyset/patella_r translation=(0 0 0)
      SpatialTransform: axes_held_at_zero=(rotation2 rotation3)
        TransformAxis rotation1: coordinates=knee_angle_r_beta axis=(0 0 1)
          SimmSpline: x=(0 0.174533 0.349066 0.523599 0.698132 0.872665 1.0472 1.22173 1.39626 1.5708 1.74533 1.91986 2.0944)
              y=(0.00113686 -0.00629212 -0.105582 -0.253683 -0.414245 -0.579047 -0.747244 -0.91799 -1.09044 -1.26379 -1.43763 -1.61186 -1.78634)
        TransformAxis translation1: coordinates=knee_angle_r_beta axis=(1 0 0)
          MultiplierFunction: scale=0.9928386
            SimmSpline f9: x=(0 0.174533 0.349066 0.523599 0.698132 0.872665 1.0472 1.22173 1.39626 1.5708 1.74533 1.91986 2.0944)
                y=(0.0524 0.0488 0.0437 0.0371 0.0296 0.0216 0.0136 0.0057 -0.0019 -0.0088 -0.0148 -0.0196 -0.0227)
        TransformAxis translation2: coordinates=knee_angle_r_beta axis=(0 1 0)
          MultiplierFunction: scale=0.9928386
            SimmSpline f10: x=(0 0.174533 0.349066 0.523599 0.698132 0.872665 1.0472 1.22173 1.39626 1.5708 1.74533 1.91986 2.0944)
                y=(-0.0108 -0.019 -0.0263 -0.0322 -0.0367 -0.0395 -0.0408 -0.0404 -0.0384 -0.0349 -0.0301 -0.0245 -0.0187)
        TransformAxis translation3: axis=(0 0 1) MultiplierFunction(scale=0.9928386, Constant(value=0.00275))
    PinJoint ankle_r: socket_parent_frame=tibia_r_offset socket_child_frame=talus_r_offset
      Coordinate ankle_angle_r: default_value=0.004024155 range=(-0.6981317 0.5235988) clamped=true
      PhysicalOffsetFrame tibia_r_offset: socket_parent=/bodyset/tibia_r translation=(-0.009929485 -0.4242266 0)
          orientation=(0.175895 -0.105208 0.0186622)
      PhysicalOffsetFrame talus_r_offset: socket_parent=/bodyset/talus_r translation=(0 0 0)
          orientation=(0.175895 -0.105208 0.0186622)
    PinJoint subtalar_r: socket_parent_frame=talus_r_offset socket_child_frame=calcn_r_offset
      Coordinate subtalar_angle_r: default_value=0.2545605 range=(-0.3490659 0.3490659) clamped=true
      PhysicalOffsetFrame talus_r_offset: socket_parent=/bodyset/talus_r translation=(-0.0442039 -0.04195 0.00812953)
          orientation=(-1.76819 0.906223 1.8196)
      PhysicalOffsetFrame calcn_r_offset: socket_parent=/bodyset/calcn_r translation=(0 0 0)
          orientation=(-1.76819 0.906223 1.8196)
    PinJoint mtp_r: socket_parent_frame=calcn_r_offset socket_child_frame=toes_r_offset
      Coordinate mtp_angle_r: default_value=-9.006625e-19 range=(-0.5235988 0.5235988) clamped=true
      PhysicalOffsetFrame calcn_r_offset: socket_parent=/bodyset/calcn_r
          translation=(0.1621943 -0.002001657 0.001109488) orientation=(-3.14159 0.619901 0)
      PhysicalOffsetFrame toes_r_offset: socket_parent=/bodyset/toes_r translation=(0 0 0)
          orientation=(-3.14159 0.619901 0)
    CustomJoint hip_l: socket_parent_frame=pelvis_offset socket_child_frame=femur_l_offset
      Coordinate hip_flexion_l: default_value=0.7637076 range=(-0.5235988 2.094395) clamped=true
      Coordinate hip_adduction_l: default_value=-0.2033302 range=(-0.8726646 0.5235988) clamped=true
      Coordinate hip_rotation_l: default_value=-0.2528838 range=(-0.6981317 0.6981317) clamped=true
      PhysicalOffsetFrame pelvis_offset: socket_parent=/bodyset/pelvis translation=(-0.0641847 -0.0802189 -0.0779238)
      PhysicalOffsetFrame femur_l_offset: socket_parent=/bodyset/femur_l translation=(0 0 0)
      SpatialTransform: axes_held_at_zero=(translation1 translation2 translation3)
        TransformAxis rotation1: coordinates=hip_flexion_l axis=(0 0 1) LinearFunction(coefficients=1 0)
        TransformAxis rotation2: coordinates=hip_adduction_l axis=(1 0 0) LinearFunction(coefficients=-1 0)
        TransformAxis rotation3: coordinates=hip_rotation_l axis=(0 1 0) LinearFunction(coefficients=-1 0)
    CustomJoint walker_knee_l: socket_parent_frame=femur_l_offset socket_child_frame=tibia_l_offset
      Coordinate knee_angle_l: default_value=1.313804e-23 range=(0 2.0944) clamped=true
      PhysicalOffsetFrame femur_l_offset: socket_parent=/bodyset/femur_l
          translation=(-0.00799907 -0.4033748 0.00271909) orientation=(1.64157 -1.44618 1.5708)
      PhysicalOffsetFrame tibia_l_offset: socket_parent=/bodyset/tibia_l
          translation=(-0.008029113 -0.003721115 0.001473646) orientation=(1.64157 -1.44618 1.5708)
      SpatialTransform: axes_held_at_zero=translation3
        TransformAxis rotation1: coordinates=knee_angle_l axis=(-1 0 0) LinearFunction(coefficients=1 0)
        TransformAxis rotation2: coordinates=knee_angle_l axis=(0 0 1)
          SimmSpline: x=(0 0.174533 0.349066 0.523599 0.698132 0.872665 1.0472 1.22173 1.39626 1.5708 1.74533 1.91986 2.0944)
              y=(0 0.0126809 0.0226969 0.0296054 0.0332049 0.0335354 0.0308779 0.0257548 0.0189295 0.011407 0.00443314 -0.00050475 -0.0016782)
        TransformAxis rotation3: coordinates=knee_angle_l axis=(0 1 0)
          SimmSpline: x=(0 0.174533 0.349066 0.523599 0.698132 0.872665 1.0472 1.22173 1.39626 1.5708 1.74533 1.91986 2.0944)
              y=(0 -0.059461 -0.109399 -0.150618 -0.18392 -0.210107 -0.229983 -0.24435 -0.254012 -0.25977 -0.262428 -0.262788 -0.261654)
        TransformAxis translation1: coordinates=knee_angle_l axis=(0 1 0)
          MultiplierFunction: scale=0.9638215
            SimmSpline: x=(0 0.174533 0.349066 0.523599 0.698132 0.872665 1.0472 1.22173 1.39626 1.5708 1.74533 1.91986 2.0944)
                y=(0 0.000479 0.000835 0.001086 0.001251 0.001346 0.001391 0.001403 0.0014 0.0014 0.001421 0.001481 0.001599)
        TransformAxis translation2: coordinates=knee_angle_l axis=(0 0 1)
          MultiplierFunction: scale=0.9638215
            SimmSpline: x=(0 0.174533 0.349066 0.523599 0.698132 0.872665 1.0472 1.22173 1.39626 1.5708 1.74533 1.91986 2.0944)
                y=(0 -0.000988 -0.001899 -0.002734 -0.003492 -0.004173 -0.004777 -0.005305 -0.005756 -0.00613 -0.006427 -0.006648 -0.006792)
    CustomJoint patellofemoral_l: socket_parent_frame=femur_l_offset socket_child_frame=patella_l_offset
      Coordinate knee_angle_l_beta: default_value=0 range=(-99999.9 99999.9) clamped=false
          is_free_to_satisfy_constraints=true
      PhysicalOffsetFrame femur_l_offset: socket_parent=/bodyset/femur_l
          translation=(-0.00799907 -0.4033748 0.00271909)
      PhysicalOffsetFrame patella_l_offset: socket_parent=/bodyset/patella_l translation=(0 0 0)
      SpatialTransform: axes_held_at_zero=(rotation2 rotation3)
        TransformAxis rotation1: coordinates=knee_angle_l_beta axis=(0 0 1)
          SimmSpline: x=(0 0.174533 0.349066 0.523599 0.698132 0.872665 1.0472 1.22173 1.39626 1.5708 1.74533 1.91986 2.0944)
              y=(0.00113686 -0.00629212 -0.105582 -0.253683 -0.414245 -0.579047 -0.747244 -0.91799 -1.09044 -1.26379 -1.43763 -1.61186 -1.78634)
        TransformAxis translation1: coordinates=knee_angle_l_beta axis=(1 0 0)
          MultiplierFunction: scale=0.9638215
            SimmSpline f23: x=(0 0.174533 0.349066 0.523599 0.698132 0.872665 1.0472 1.22173 1.39626 1.5708 1.74533 1.91986 2.0944)
                y=(0.0524 0.0488 0.0437 0.0371 0.0296 0.0216 0.0136 0.0057 -0.0019 -0.0088 -0.0148 -0.0196 -0.0227)
        TransformAxis translation2: coordinates=knee_angle_l_beta axis=(0 1 0)
          MultiplierFunction: scale=0.9638215
            SimmSpline f24: x=(0 0.174533 0.349066 0.523599 0.698132 0.872665 1.0472 1.22173 1.39626 1.5708 1.74533 1.91986 2.0944)
                y=(-0.0108 -0.019 -0.0263 -0.0322 -0.0367 -0.0395 -0.0408 -0.0404 -0.0384 -0.0349 -0.0301 -0.0245 -0.0187)
        TransformAxis translation3: axis=(0 0 1) MultiplierFunction(scale=0.9638215, Constant(value=-0.00275))
    PinJoint ankle_l: socket_parent_frame=tibia_l_offset socket_child_frame=talus_l_offset
      Coordinate ankle_angle_l: default_value=0.01492553 range=(-0.6981317 0.5235988) clamped=true
      PhysicalOffsetFrame tibia_l_offset: socket_parent=/bodyset/tibia_l translation=(-0.009925293 -0.4210831 0)
          orientation=(-0.175895 0.105208 0.0186622)
      PhysicalOffsetFrame talus_l_offset: socket_parent=/bodyset/talus_l translation=(0 0 0)
          orientation=(-0.175895 0.105208 0.0186622)
    PinJoint subtalar_l: socket_parent_frame=talus_l_offset socket_child_frame=calcn_l_offset
      Coordinate subtalar_angle_l: default_value=0.2818044 range=(-0.3490659 0.3490659) clamped=true
      PhysicalOffsetFrame talus_l_offset: socket_parent=/bodyset/talus_l translation=(-0.0436964 -0.04195 -0.00810858)
          orientation=(1.76819 -0.906223 1.8196)
      PhysicalOffsetFrame calcn_l_offset: socket_parent=/bodyset/calcn_l translation=(0 0 0)
          orientation=(1.76819 -0.906223 1.8196)
    PinJoint mtp_l: socket_parent_frame=calcn_l_offset socket_child_frame=toes_l_offset
      Coordinate mtp_angle_l: default_value=9.831091e-20 range=(-0.5235988 0.5235988) clamped=true
      PhysicalOffsetFrame calcn_l_offset: socket_parent=/bodyset/calcn_l
          translation=(0.1690766 -0.002110833 -0.001166995) orientation=(-3.14159 -0.619901 0)
      PhysicalOffsetFrame toes_l_offset: socket_parent=/bodyset/toes_l translation=(0 0 0)
          orientation=(-3.14159 -0.619901 0)
    CustomJoint back: socket_parent_frame=pelvis_offset socket_child_frame=torso_offset
      Coordinate lumbar_extension: default_value=0.07537854 range=(-1.570796 1.570796) clamped=true
      Coordinate lumbar_bending: default_value=-0.03299077 range=(-1.570796 1.570796) clamped=true
      Coordinate lumbar_rotation: default_value=0.3178116 range=(-2.094395 2.094395) clamped=true
      PhysicalOffsetFrame pelvis_offset: socket_parent=/bodyset/pelvis translation=(-0.114852 0.0832952 0)
      PhysicalOffsetFrame torso_offset: socket_parent=/bodyset/torso translation=(0 0 0)
      SpatialTransform: axes_held_at_zero=(translation1 translation2 translation3)
        TransformAxis rotation1: coordinates=lumbar_extension axis=(0 0 1) LinearFunction(coefficients=1 0)
        TransformAxis rotation2: coordinates=lumbar_bending axis=(1 0 0) LinearFunction(coefficients=1 0)
        TransformAxis rotation3: coordinates=lumbar_rotation axis=(0 1 0) LinearFunction(coefficients=1 0)
    CustomJoint acromial_r: socket_parent_frame=torso_offset socket_child_frame=humerus_r_offset
      Coordinate arm_flex_r: default_value=0.5075635 range=(-2.094395 3.141593) clamped=true
      Coordinate arm_add_r: default_value=0.2994395 range=(-2.094395 1.570796) clamped=true
      Coordinate arm_rot_r: default_value=-0.328745 range=(-1.570796 1.570796) clamped=true
      PhysicalOffsetFrame torso_offset: socket_parent=/bodyset/torso translation=(0.003287082 0.406848 0.2235299)
      PhysicalOffsetFrame humerus_r_offset: socket_parent=/bodyset/humerus_r translation=(0 0 0)
      SpatialTransform: axes_held_at_zero=(translation1 translation2 translation3)
        TransformAxis rotation1: coordinates=arm_flex_r axis=(0 0 1) LinearFunction(coefficients=1 0)
        TransformAxis rotation2: coordinates=arm_add_r axis=(1 0 0) LinearFunction(coefficients=1 0)
        TransformAxis rotation3: coordinates=arm_rot_r axis=(0 1 0) LinearFunction(coefficients=1 0)
    PinJoint elbow_r: socket_parent_frame=humerus_r_offset socket_child_frame=ulna_r_offset
      Coordinate elbow_flex_r: default_value=0.1758049 range=(0 2.618) clamped=true
      PhysicalOffsetFrame humerus_r_offset: socket_parent=/bodyset/humerus_r
          translation=(0.01766522 -0.3847441 -0.01289545) orientation=(-0.0228627 0.228018 0.0051689)
      PhysicalOffsetFrame ulna_r_offset: socket_parent=/bodyset/ulna_r translation=(0 0 0)
          orientation=(-0.0228627 0.228018 0.0051689)
    PinJoint radioulnar_r: socket_parent_frame=ulna_r_offset socket_child_frame=radius_r_offset
      Coordinate pro_sup_r: default_value=0.2940286 range=(0 1.570796) clamped=true
      PhysicalOffsetFrame ulna_r_offset: socket_parent=/bodyset/ulna_r translation=(-0.007831101 -0.01514184 0.030364)
          orientation=(-1.56884 0.056428 1.53614)
      PhysicalOffsetFrame radius_r_offset: socket_parent=/bodyset/radius_r translation=(0 0 0)
          orientation=(-1.56884 0.056428 1.53614)
    UniversalJoint radius_hand_r: socket_parent_frame=radius_r_offset socket_child_frame=hand_r_offset
      Coordinate wrist_flex_r: default_value=1.22173 range=(-1.22173 1.22173) clamped=true
      Coordinate wrist_dev_r: default_value=0.6108652 range=(-0.7853982 0.7853982) clamped=true
      PhysicalOffsetFrame radius_r_offset: socket_parent=/bodyset/radius_r
          translation=(-0.01024085 -0.2745495 0.01584381) orientation=(-1.5708 0 -1.5708)
      PhysicalOffsetFrame hand_r_offset: socket_parent=/bodyset/hand_r translation=(0 0 0)
          orientation=(-1.5708 0 -1.5708)
    CustomJoint acromial_l: socket_parent_frame=torso_offset socket_child_frame=humerus_l_offset
      Coordinate arm_flex_l: default_value=0.3014919 range=(-2.094395 3.141593) clamped=true
      Coordinate arm_add_l: default_value=0.2785658 range=(-2.094395 1.570796) clamped=true
      Coordinate arm_rot_l: default_value=-0.07343781 range=(-1.570796 1.570796) clamped=true
      PhysicalOffsetFrame torso_offset: socket_parent=/bodyset/torso translation=(0.003287082 0.406848 -0.2235299)
      PhysicalOffsetFrame humerus_l_offset: socket_parent=/bodyset/humerus_l translation=(0 0 0)
      SpatialTransform: axes_held_at_zero=(translation1 translation2 translation3)
        TransformAxis rotation1: coordinates=arm_flex_l axis=(0 0 1) LinearFunction(coefficients=1 0)
        TransformAxis rotation2: coordinates=arm_add_l axis=(-1 0 0) LinearFunction(coefficients=1 0)
        TransformAxis rotation3: coordinates=arm_rot_l axis=(0 -1 0) LinearFunction(coefficients=1 0)
    PinJoint elbow_l: socket_parent_frame=humerus_l_offset socket_child_frame=ulna_l_offset
      Coordinate elbow_flex_l: default_value=0.4349391 range=(0 2.618) clamped=true
      PhysicalOffsetFrame humerus_l_offset: socket_parent=/bodyset/humerus_l
          translation=(0.01634619 -0.3560159 0.01193257) orientation=(0.0228627 -0.228018 0.0051689)
      PhysicalOffsetFrame ulna_l_offset: socket_parent=/bodyset/ulna_l translation=(0 0 0)
          orientation=(0.0228627 -0.228018 0.0051689)
    PinJoint radioulnar_l: socket_parent_frame=ulna_l_offset socket_child_frame=radius_l_offset
      Coordinate pro_sup_l: default_value=0.3725427 range=(0 1.570796) clamped=true
      PhysicalOffsetFrame ulna_l_offset: socket_parent=/bodyset/ulna_l
          translation=(-0.007767758 -0.01501936 -0.03011839) orientation=(1.56884 -0.056428 1.53614)
      PhysicalOffsetFrame radius_l_offset: socket_parent=/bodyset/radius_l translation=(0 0 0)
          orientation=(1.56884 -0.056428 1.53614)
    UniversalJoint radius_hand_l: socket_parent_frame=radius_l_offset socket_child_frame=hand_l_offset
      Coordinate wrist_flex_l: default_value=1.110577 range=(-1.22173 1.22173) clamped=true
      Coordinate wrist_dev_l: default_value=0.6108652 range=(-0.7853982 0.7853982) clamped=true
      PhysicalOffsetFrame radius_l_offset: socket_parent=/bodyset/radius_l
          translation=(-0.01015801 -0.2723288 -0.01571565) orientation=(1.5708 0 1.5708)
      PhysicalOffsetFrame hand_l_offset: socket_parent=/bodyset/hand_l translation=(0 0 0)
          orientation=(1.5708 0 1.5708)
    WeldJoint hand_l_to_club: socket_parent_frame=/bodyset/hand_l/hand_l_grip_offset
        socket_child_frame=/bodyset/Club/club_grip_offset
  ConstraintSet:
    CoordinateCouplerConstraint patellofemoral_knee_angle_r_con: independent_coordinate_names=knee_angle_r
        dependent_coordinate_name=knee_angle_r_beta scale_factor=1
        coupled_coordinates_function=LinearFunction(coefficients=1 0)
    CoordinateCouplerConstraint patellofemoral_knee_angle_l_con: independent_coordinate_names=knee_angle_l
        dependent_coordinate_name=knee_angle_l_beta scale_factor=1
        coupled_coordinates_function=LinearFunction(coefficients=1 0)
    WeldConstraint hand_r_to_club: socket_frame1=/bodyset/hand_r/hand_r_grip_offset
        socket_frame2=/bodyset/Club/club_trail_grip_offset
  ForceSet:
    CoordinateActuator tau_pelvis_tilt: coordinate=pelvis_tilt optimal_force=1
    CoordinateActuator tau_pelvis_list: coordinate=pelvis_list optimal_force=1
    CoordinateActuator tau_pelvis_rotation: coordinate=pelvis_rotation optimal_force=1
    CoordinateActuator tau_pelvis_tx: coordinate=pelvis_tx optimal_force=1
    CoordinateActuator tau_pelvis_ty: coordinate=pelvis_ty optimal_force=1
    CoordinateActuator tau_pelvis_tz: coordinate=pelvis_tz optimal_force=1
    CoordinateActuator tau_hip_flexion_r: coordinate=hip_flexion_r optimal_force=1
    CoordinateActuator tau_hip_adduction_r: coordinate=hip_adduction_r optimal_force=1
    CoordinateActuator tau_hip_rotation_r: coordinate=hip_rotation_r optimal_force=1
    CoordinateActuator tau_knee_angle_r: coordinate=knee_angle_r optimal_force=1
    CoordinateActuator tau_knee_angle_r_beta: coordinate=knee_angle_r_beta optimal_force=1
    CoordinateActuator tau_ankle_angle_r: coordinate=ankle_angle_r optimal_force=1
    CoordinateActuator tau_subtalar_angle_r: coordinate=subtalar_angle_r optimal_force=1
    CoordinateActuator tau_mtp_angle_r: coordinate=mtp_angle_r optimal_force=1
    CoordinateActuator tau_hip_flexion_l: coordinate=hip_flexion_l optimal_force=1
    CoordinateActuator tau_hip_adduction_l: coordinate=hip_adduction_l optimal_force=1
    CoordinateActuator tau_hip_rotation_l: coordinate=hip_rotation_l optimal_force=1
    CoordinateActuator tau_knee_angle_l: coordinate=knee_angle_l optimal_force=1
    CoordinateActuator tau_knee_angle_l_beta: coordinate=knee_angle_l_beta optimal_force=1
    CoordinateActuator tau_ankle_angle_l: coordinate=ankle_angle_l optimal_force=1
    CoordinateActuator tau_subtalar_angle_l: coordinate=subtalar_angle_l optimal_force=1
    CoordinateActuator tau_mtp_angle_l: coordinate=mtp_angle_l optimal_force=1
    CoordinateActuator tau_lumbar_extension: coordinate=lumbar_extension optimal_force=1
    CoordinateActuator tau_lumbar_bending: coordinate=lumbar_bending optimal_force=1
    CoordinateActuator tau_lumbar_rotation: coordinate=lumbar_rotation optimal_force=1
    CoordinateActuator tau_arm_flex_r: coordinate=arm_flex_r optimal_force=1
    CoordinateActuator tau_arm_add_r: coordinate=arm_add_r optimal_force=1
    CoordinateActuator tau_arm_rot_r: coordinate=arm_rot_r optimal_force=1
    CoordinateActuator tau_elbow_flex_r: coordinate=elbow_flex_r optimal_force=1
    CoordinateActuator tau_pro_sup_r: coordinate=pro_sup_r optimal_force=1
    CoordinateActuator tau_wrist_flex_r: coordinate=wrist_flex_r optimal_force=1
    CoordinateActuator tau_wrist_dev_r: coordinate=wrist_dev_r optimal_force=1
    CoordinateActuator tau_arm_flex_l: coordinate=arm_flex_l optimal_force=1
    CoordinateActuator tau_arm_add_l: coordinate=arm_add_l optimal_force=1
    CoordinateActuator tau_arm_rot_l: coordinate=arm_rot_l optimal_force=1
    CoordinateActuator tau_elbow_flex_l: coordinate=elbow_flex_l optimal_force=1
    CoordinateActuator tau_pro_sup_l: coordinate=pro_sup_l optimal_force=1
    CoordinateActuator tau_wrist_flex_l: coordinate=wrist_flex_l optimal_force=1
    CoordinateActuator tau_wrist_dev_l: coordinate=wrist_dev_l optimal_force=1
  ScalingMetadata: policy=fixed_mass
    scale_factors: femur_r=0.9922235 femur_l=1.025874 tibia_r=0.9673524 tibia_l=0.9694467 calcn_r=1.000828
        calcn_l=1.055416 humerus_r=1.343976 humerus_l=1.243624 radius_r=1.16413 radius_l=1.154713 torso=1.041864
