# OpenSim document version 40600
Model pendulum_1dof:
  gravity: 0 -9.80665 0
  # Simple 1-DOF pendulum for cross-engine validation, in OpenSim 4.x format
  # (the previous OpenSim 3.x file no longer loaded, #12983).
  # - One PinJoint about the ground z axis; gravity -9.80665 m/s^2 along y.
  # - Uniform 1 kg rod of length 1 m: mass centre 0.5 m below the pivot and
  # Izz = 1/12 kg m^2 about it, so the pivot inertia is 1/3 kg m^2.
  # - No damping, friction or actuators.
  Ground
  BodySet:
    Body pendulum_link: mass=1 [kg] mass_center=(0 -0.5 0) inertia=(0.0833333 0 0.0833333 0 0 0)
  JointSet:
    PinJoint pin_joint: socket_parent_frame=ground_offset socket_child_frame=pendulum_link_offset
      Coordinate angle: default_value=0.1 range=(-3.14159 3.14159)
      PhysicalOffsetFrame ground_offset: socket_parent=/ground translation=(0 0 0) [meters]
      PhysicalOffsetFrame pendulum_link_offset: socket_parent=/bodyset/pendulum_link translation=(0 0 0)
  MarkerSet:
    Marker end_effector: pendulum_link (0 -1 0)
